ons 28 jun 2017 08:56:35 CEST
$PROBLEM
$INPUT      ID TIME AMT EVID DV
$DATA      data.csv IGNORE=@
$SUBROUTINE ADVAN2 TRANS2
$ABBREVIATED DECLARE T(NO)
$ABBREVIATED DECLARE DOWHILE J
$ABBREVIATED DECLARE INTEGER I
$PK


CL = THETA(1)*EXP(ETA(1))
V = THETA(2)*EXP(ETA(2))
KA = THETA(3)*EXP(ETA(3))
SC = V

$ERROR

IF (ICALL.EQ.4) THEN
IF(NEWIND.NE.2)I=0
IF(MDV.EQ.0)THEN
   I=I+1
   T(I)=TIME
   J=1
   DO WHILE (J <= I)
    CORRL2(J,1)=EXP(-0.6931/THETA(5)*(TIME-T(J)))
    J=J+1
   ENDDO
ENDIF
CALL SIMEPS(EPS)
ENDIF

IPRED = F
W = THETA(4)
IF(TIME.LT.4) W = 2*W
Y = IPRED + W*EPS(1)

$THETA  (0,2)
 (0,20)
 (0,0.2)
 (0,0.1)
 (0,4)
$OMEGA  0.1
 0.1
 0.1
$SIGMA  1.0  FIX
$SIMULATION (1234) NSUB=1
$TABLE      ID TIME AMT EVID DV NOPRINT NOAPPEND ONEHEADER
            FILE=simdata.dat

NM-TRAN MESSAGES
 WARNINGS AND ERRORS (IF ANY) FOR PROBLEM    1
 (WARNING  2) NM-TRAN INFERS THAT THE DATA ARE POPULATION.
 (WARNING  116) A SIMULATION BLOCK ASSIGNS VALUES TO CORRL2 AND CALLS
 SIMEPS.  THE DEFAULT CALL TO SIMEPS WILL BE OMITTED.
Note: The following floating-point exceptions are signalling: IEEE_INVALID_FLAG IEEE_DIVIDE_BY_ZERO

1NONLINEAR MIXED EFFECTS MODEL PROGRAM (NONMEM) VERSION 7.3.0
 ORIGINALLY DEVELOPED BY STUART BEAL, LEWIS SHEINER, AND ALISON BOECKMANN
 CURRENT DEVELOPERS ARE ROBERT BAUER, ICON DEVELOPMENT SOLUTIONS,
 AND ALISON BOECKMANN. IMPLEMENTATION, EFFICIENCY, AND STANDARDIZATION
 PERFORMED BY NOUS INFOSYSTEMS.
 PROBLEM NO.:         1

 TOT. NO. OF OBS RECS:      180
 TOT. NO. OF INDIVIDUALS:     20
 ONE COMPARTMENT MODEL WITH FIRST-ORDER ABSORPTION (ADVAN2)
 PROBLEM NO.:         1     SUBPROBLEM NO.:      1
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 SIMULATION STEP PERFORMED
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
 ********************                             FIRST ORDER (EVALUATION)                           ********************
 #OBJT:**************                       MINIMUM VALUE OF OBJECTIVE FUNCTION                      ********************
 #OBJV:********************************************     -352.144       **************************************************

 ********************                             FIRST ORDER (EVALUATION)                           ********************
 ********************                             FINAL PARAMETER ESTIMATE                           ********************

 THETA - VECTOR OF FIXED EFFECTS PARAMETERS   *********
         TH 1      TH 2      TH 3      TH 4      TH 5
         2.00E+00  2.00E+01  2.00E-01  1.00E-01  4.00E+00

 OMEGA - COV MATRIX FOR RANDOM EFFECTS - ETAS  ********
            ETA1      ETA2      ETA3
 ETA1
+        1.00E-01
 ETA2
+        0.00E+00  1.00E-01
 ETA3
+        0.00E+00  0.00E+00  1.00E-01

 SIGMA - COV MATRIX FOR RANDOM EFFECTS - EPSILONS  ****
            EPS1
 EPS1
+        1.00E+00

 OMEGA - CORR MATRIX FOR RANDOM EFFECTS - ETAS  *******
            ETA1      ETA2      ETA3
 ETA1
+        3.16E-01
 ETA2
+        0.00E+00  3.16E-01
 ETA3
+        0.00E+00  0.00E+00  3.16E-01

 SIGMA - CORR MATRIX FOR RANDOM EFFECTS - EPSILONS  ***
            EPS1
 EPS1
+        1.00E+00
 #CPUT: Total CPU Time in Seconds,        0.028
